<?xml version="1.0"?>

<!-- Generated by Aero-Matic v 0.7

     Inputs:
       horsepower:   3.8
       pitch:        fixed
     Outputs:
       linear-blade-inches: 10.331602005498
-->

<propeller name="Rascal Propeller">
  <ixx> 0.00050 </ixx>
  <diameter unit="IN"> 18.0 </diameter>
  <numblades> 2 </numblades>
  <minpitch> 10 </minpitch>
  <maxpitch> 10 </maxpitch>

  <table name="C_THRUST" type="internal">
    <tableData>
      0.00000 0.08999
      0.05000 0.09180
      0.10000 0.08567
      0.15000 0.08197
      0.20000 0.07733
      0.25000 0.07148
      0.30000 0.06599
      0.35000 0.06019
      0.40000 0.05406
      0.45000 0.04761
      0.50000 0.04084
      0.55000 0.03383
      0.60000 0.02659
      0.65000 0.01910
      0.66000 0.01757
      0.67000 0.01604
      0.68000 0.01449
      0.69000 0.01294
      0.70000 0.01136
      0.71000 0.00978
      0.72000 0.00820
      0.73000 0.00660
      0.74000 0.00499
      0.75000 0.00337
      0.76000 0.00174
      0.77000 0.00011
      0.78000 -0.00155
      0.79000 -0.00321
      0.80000 -0.00487
      0.81000 -0.00657
    </tableData>
  </table>

  <table name="C_POWER" type = "internal">
    <tableData>
        0.00000 0.04123
        0.05000 0.03423
        0.10000 0.04237
        0.15000 0.04245
        0.20000 0.04207
        0.25000 0.04087
        0.30000 0.03963
        0.35000 0.03802
        0.40000 0.03599
        0.45000 0.03350
        0.50000 0.03050
        0.55000 0.02700
        0.60000 0.02296
        0.65000 0.01836
        0.66000 0.01737
        0.67000 0.01636
        0.68000 0.01532
        0.69000 0.01425
        0.70000 0.01316
        0.71000 0.01204
        0.72000 0.01091
        0.73000 0.00974
        0.74000 0.00854
        0.75000 0.00732
        0.76000 0.00607
        0.77000 0.00481
        0.78000 0.00350
        0.79000 0.00216
        0.80000 0.00082
        0.81000 -0.00058

    </tableData>
  </table>

</propeller>
